// SBML level 3 version 2
// Minimal model for issue #18 (amount vs concentration).
//      Compartment C has a non-unit volume (5), so a species' concentration and
//      its amount/particle-number differ and the species_units conversion is
//      observable. S1 is a normal (concentration) species; S2 carries
//      hasOnlySubstanceUnits="true" — the exact case the issue calls out, where
//      COPASI's bare name ("S2") reports particle count while "[S2]" reports
//      concentration.

model units_test()

  // Compartments:
  compartment C = 5;

  // Species:
  species S1 in C = 2;
  substanceOnly species S2 in C = 100;

  // Parameters:
  k = 0.1;

  // Reactions:
  R: S1 => S2; k*S1*C;
end
